П1
ΔT := 2/N = 2 1/N
N = 1 N
# Количество отсчётов
N := 2^10
# Период дискретизации
ΔT := 2^-10
n := 1 .. N - 1
# параметры сигнала для трех экспериментов
# 1<A<10 | Пределы переменных
# 3<θ<10
A := 5
α := 3
f := π
# 2<α<4
# 0<ϕ<2π
# формула входного сигнала
s(t, θ) := A*sin(2*π*θ*t + f)*exp(-α*t)
θ_true := 2/4 = 0.5  # Переменная, отвечающая за задержку во времени
S[n] := s(n*ΔT, θ_true)
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П2
d := 6
# Смесь w1 и w2 - основное и загрязняющее соответсвенно; основное w1 -  гауссовское; загрязняющее  w2- распределение Стьюдента
σ1 := 0.5  # фиксированое значение
σ2 := sqrt(d/(d - 2))
σ2 = 1.22474  # выражение для значение W2
ε := (1 - σ1^2)/(σ2^2 - σ1^2)
ε = 0.6  # доля засоряющих наблюдений
# Зададим СКО исходя из следующего правила, что дисперсия итоговой помехи была равна 1
m := 0  # Математическое ожидание
w1 := rnorm(N, m, σ1)
w2 := rt(N, d)
Выборка
v_T :=
    p ← runif(N, 0, 1)
    for nn ∈ 0 .. N - 1
        v[nn] ← if(p[nn] ≤ (1 - ε), w1[nn], w2[nn])
    v
# Проверка МО и СКО помехи
mean(v_T) = 0.0673847
stdev(v_T) = 1.12637
p_one(x) := (1 - ε)*dnorm(x, m, σ1) + ε*dt(x, d)  # плотность распределения вероятности
M_theor := integral(x*p_one(x), x = -∞ .. ∞) = 0
STD_theor := sqrt(integral((x - M_theor)^2*p_one(x), x = -∞ .. ∞)) = 1
λ := 1/STD_theor
λ = 1
П3
# Напишем функцию плотности распределения вероятностей смеси помех, согласно формуле 2
# Зададим смесь полезного сигнала с помехой
x[n] := S[n] + v_T[n]
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MNK(x, θ_true) := sum((x[n] - s(n*ΔT, θ_true))^2, n = 0 .. N - 1)
П4
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θlen := 1000
m := 0 .. θlen - 1
θmin := 1/4
θmax := 3/4
shag := (θmax - θmin)/θlen = 0.0005
θvariant[m] := θmin + shag*m
mnk(X, W) :=
    E ← 0
    for n ∈ 0 .. N - 1
        Sq[n] ← s(n*ΔT, W)
        E ← E + (X[n] - Sq[n])^2
    -E
MNK[m] := mnk(x, θvariant[m])
θ_MNK(x) :=
    for m ∈ 0, 1 .. θlen
        θvariant[m] ← θmin + shag*m
        MNK[m] ← mnk(x, θvariant[m])
    θvariant[round(mean(match(max(MNK), MNK)))]
θ_MNK(x) = 0.5035  # по результатам оценки
θ_true = 0.5  # истинное
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θvariant[round(mean(match(max(MNK), MNK)))] = 0.5035
lfp(X, W) :=
    L ← 0
    for n ∈ 0 .. N - 1
        Sq[n] ← s(n*ΔT, W)
        Λn ← p_one(X[n] - Sq[n])
        if Λn == 0
            L ← -10^8
            break
        L ← L + ln(Λn)
    L
LFP[m] := lfp(x, θvariant[m])
lfp(x, θ_true) = -1417.29
θ_MMP(x) :=
    for m ∈ 0, 1 .. θlen
        θvariant[m] ← θmin + shag*m
        LFP[m] ← lfp(x, θvariant[m])
    θvariant[round(mean(match(max(LFP), LFP)))]
θ_MMP(x) = 0.4915  # по результатам оценки
θ_true = 0.5  # истинное
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θvariant[round(mean(match(max(LFP), LFP)))] = 0.4915
M := 500
[MMP_Stat_Mod; MNK_Stat_Mod] :=
    for m ∈ 0, 1 .. M
        w ← rt(N, d)
        v ← λ*w
        x ← S + v
        MMP[m] ← θ_MMP(x)
        MNK[m] ← θ_MNK(x)
    [MMP; MNK]  # error: Вы прерывали вычисление. Для продолжения кликните здесь или нажмите 'F9'.
MMP_Stat_Mod =  # no stored result
MNK_Stat_Mod =  # no stored result
# ПУНКТ 1 | ПУНКТ 2
# ДЛЯ ММП | ДЛЯ МНК
# Результаты моделировния: | Средняя величина измерения ДЛЯ МНК
# Средняя величина измерения ДЛЯ ММП
mean(MNK_Stat_Mod) =  # no stored result
mean(MMP_Stat_Mod) =  # no stored result
# Значение среднеквадратического отклонения ДЛЯ МНК
# Значение среднеквадратического отклонения ДЛЯ ММП
stdev(MNK_Stat_Mod) =  # no stored result
stdev(MMP_Stat_Mod) =  # no stored result
B_θ_MNK := stdev(MMP_Stat_Mod)
B_θ_MMP := stdev(MMP_Stat_Mod)
# НАЙДЕМ МАКСИМАЛЬНОЕ ЗНАЧЕНИЕ, НА КОТОРОЕ МОГУТ ОТКЛОНЯТЬСЯ ИЗМЕРЕНИЯ ДЛЯ ММП
# НАЙДЕМ МАКСИМАЛЬНОЕ ЗНАЧЕНИЕ, НА КОТОРОЕ МОГУТ ОТКЛОНЯТЬСЯ ИЗМЕРЕНИЯ ДЛЯ МНК
σ_θ_MNK := 3*stdev(MNK_Stat_Mod)
σ_θ_MMP := 3*stdev(MMP_Stat_Mod)
σ_θ_MNK =  # no stored result
σ_θ_MMP =  # no stored result
# СРАВНЕНИЕ РЕЗУЛЬТАТОВ ДЛЯ М = 100 И М = 1000
# Средняя величина измерения ДЛЯ ММП равна 0.499996 (СМ ПУНКТ 1)
# Средняя величина измерения ДЛЯ МНК равна 0.4999925 (СМ ПУНКТ 2)
#
# Средняя величина измерения ДЛЯ ММП (0.499996 - СМ ПУНКТ 1) меньше отличается от искомого значения θ = 0,5
# Средняя величина измерения ДЛЯ МНК (0.4999925 - СМ ПУНКТ 2) больше отличается от искомого значения θ = 0,5
# Значит, что ММП лучше, чем метод МНК
#
# Максимальное значение, на которое могут отклоняться измерения ДЛЯ ММП (СМ ПУНКТ 1) равно 0.013, что меньше Максимального значения, на которое может отклоняться измерения ДЛЯ МНК (СМ ПУНКТ 2), равняющееся 0.018
# σ_θ_MMP<σ_θ_MNK
# ПОСТРОЕНИЕ ГИСТОГРАММЫ ДЛЯ ММП
z := -3*σ_θ_MMP + B_θ_MMP, -3*σ_θ_MMP + B_θ_MMP + 6*σ_θ_MMP/200 .. 3*σ_θ_MMP + B_θ_MMP
I := floor(sqrt(N))
i := 1 .. I - 1
P(w) :=
    hh ← (max(w) - min(w))/I
    for i ∈ 0 .. I - 1
        int[i] ← min(w) + i*hh
    hhr ← 1/(N*hh)*hist(int, w)
    [int + hh/2, hhr]
[int, hhr1] := P(v_one)
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# ПОСТРОЕНИЕ ГИСТОГРАММЫ ДЛЯ МНК
z := -3*σ_θ_MNK + B_θ_MNK, -3*σ_θ_MNK + B_θ_MNK + 6*σ_θ_MNK/200 .. 3*σ_θ_MNK + B_θ_MNK
I := floor(sqrt(N))
i := 1 .. I - 1
P2(w) :=
    hh ← (max(w) - min(w))/I
    for i ∈ 0 .. I - 1
        int[i] ← min(w) + i*hh
    hhr ← 1/(N*hh)*hist(int, w)
    [int + hh/2, hhr]
[int, hhr12] := P2(v_one)
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